# ГЕНЕРАЦИЯ ПАЛИТРЫ URANIUM С ПРОИЗВОЛЬНОЙ РАЗРЯДНОСТЬЮ:
nBits := 8
N := 1
n := 0 .. N
OX[n] := round(n*2^nBits/N)
transpose(OX) = [0, 256]
# Находим характерные точки в представленной палитре: | RED | GREEN | BLUE
R_OY := [0, 207]
colors[1, 0] := 255
colors[1, 1] := 255
colors[1, 2] := 255
G_OY := [0, 255]
colors[0, 0] := 0
colors[0, 1] := 0
colors[0, 2] := 0
B_OY := [0, 8]
# Линейная интерполяция между узлами:
LINEAR(X1, Y1, X2, Y2, X) :=
    ΔX ← X2 - X1
    ΔY ← Y2 - Y1
    perc_X ← (X - X1)/ΔX
    Y ← Y1 + perc_X*ΔY
    Y
# Получение энергии по некоторому каналу:
Get_CHANNEL(A, E, X, OX, _OY) :=
    Ret ← -1
    for i ∈ 0 .. length(OX) - 2
        if OX[i] ≤ X and X ≤ OX[i + 1]
            Ret ← LINEAR(OX[i], _OY[0, i], OX[i + 1], _OY[0, i + 1], X)
            break
    Ret ← 0 if Ret < 0
    Ret ← 255 if Ret > 255
    Ret
# Нужно отобразить цветом значения A..E:
A := 0
E := 2^nBits
E = 256
x := 0 .. E - 1
MyTOPO_R[x] := Get_CHANNEL(A, E, x, OX, R_OY)
MyTOPO_G[x] := Get_CHANNEL(A, E, x, OX, G_OY)
MyTOPO_B[x] := Get_CHANNEL(A, E, x, OX, B_OY)
WRITEBIN("URANIUM_PALETTE_R.raw", "byte", 0, MyTOPO_R) = 0
WRITEBIN("URANIUM_PALETTE_G.raw", "byte", 0, MyTOPO_G) = 0
WRITEBIN("URANIUM_PALETTE_B.raw", "byte", 0, MyTOPO_B) = 0
rows(MyTOPO_R) = 256
rows(MyTOPO_G) = 256
rows(MyTOPO_B) = 256
cols(MyTOPO_R) = 1
cols(MyTOPO_G) = 1
cols(MyTOPO_B) = 1
# [component: inputs transpose(MyTOPO_R), transpose(MyTOPO_G), transpose(MyTOPO_B)]
